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/batch
! ANSYS input file written by Workbench version 2023 R1
! File used for geometry attach: E:\学习材料\课程内容\大三下\设计与制造2\大作业\model\assemble_1.x_t
/title,ansys_1--____ (A5)
/COM,/COM,     ANSYSMotion, 2023.1
/com,--- Data in consistent NMM units. See Solving Units in the help system for more information.
/units,MPA
/prep7
! Turn off shape checking because checks already performed inside WB mesher.
! See help system for more information.
SHPP,OFF,,NOWARN
etcon,set             ! allow ANSYS to choose best KEYOP's for 180x elements, resets any applicable keyopt to MAPDL defaults
/com,*********** Nodes for the whole assembly ***********
nblock,3,,22731
(1i9,3e20.9e3)
        1     3.234386164E+01    -1.301437500E+02     1.375000000E+02
        2     3.638377477E+01    -1.301437500E+02     1.267098721E+02
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-1
/com,*********** Nodes for all Remote Points ***********
nblock,3
(1i9,3e20.9e3)
    20666     0.000000000E+00     0.000000000E+00     0.000000000E+00
    20667     0.000000000E+00     0.000000000E+00     0.000000000E+00
    20668     0.000000000E+00     0.000000000E+00     0.000000000E+00
    20669     0.000000000E+00     0.000000000E+00     0.000000000E+00
    20670     0.000000000E+00     0.000000000E+00     0.000000000E+00
    20671     0.000000000E+00     0.000000000E+00     0.000000000E+00
-1
/com,*********** Elements for Body 1 "bolt11" ***********
et,1,187
eblock,19,solid,,444
(19i9)
        1        1        1        1        0        0        0        0       10        0     9610    18953    18964    18960    18963    19716    19728    19714    19715
    19729    19727
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-1
/com,*********** Elements for Body 2 "bolt8" ***********
et,2,187
eblock,19,solid,,444
(19i9)
        2        2        2        2        0        0        0        0       10        0     7834    15209    15220    15216    15219    15972    15984    15970    15971
    15985    15983
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-1
/com,*********** Elements for Body 3 "bolt9" ***********
et,3,187
eblock,19,solid,,444
(19i9)
        3        3        3        3        0        0        0        0       10        0     8278    16145    16156    16152    16155    16908    16920    16906    16907
    16921    16919
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-1
/com,*********** Elements for Body 4 "bolt10" ***********
et,4,187
eblock,19,solid,,444
(19i9)
        4        4        4        4        0        0        0        0       10        0     8722    17081    17092    17088    17091    17844    17856    17842    17843
    17857    17855
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-1
/com,*********** Elements for Body 5 "bolt7" ***********
et,5,187
eblock,19,solid,,444
(19i9)
        5        5        5        5        0        0        0        0       10        0     9166    18017    18028    18024    18027    18780    18792    18778    18779
    18793    18791
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-1
/com,*********** Elements for Body 6 "bolt12" ***********
et,6,187
eblock,19,solid,,444
(19i9)
        6        6        6        6        0        0        0        0       10        0    10054    19889    19900    19896    19899    20652    20664    20650    20651
    20665    20663
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-1
/com,*********** Elements for Body 7 "up" ***********
et,7,187
eblock,19,solid,,3510
(19i9)
        7        7        7        7        0        0        0        0       10        0        1      947     1190     1096     1150     6187     6855     6182     6185
     6945     6852
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-1
/com,*********** Elements for Body 8 "down" ***********
et,8,187
eblock,19,solid,,4323
(19i9)
        8        8        8        8        0        0        0        0       10        0     3511     7271     8298     7275     8289    10338    10354    10333    10337
    15048    10353
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-1
/com,*********** Send User Defined Coordinate System(s) ***********
local,12,0,2.03297250935722,-60.,120.,-90.,0.,-90.
local,13,0,2.03297250935722,-90.,120.,90.,0.,90.
local,14,0,2.03297250935722,-120.,120.,90.,0.,90.
csys,0
toffst,273.15,  ! Temperature offset from absolute zero
/com,*********** Set Reference Temperature ***********
tref,22.
/com,*********** Send Materials ***********
Temperature = 'TEMP' ! Temperature
MP,DENS,1,7.75e-09,	! tonne mm^-3
MP,ALPX,1,1.7e-05,	! C^-1
MP,C,1,480000000,	! mm^2 s^-2 C^-1
MP,KXX,1,15.1,	! tonne mm s^-3 C^-1
MP,RSVX,1,0.00077,	! ohm mm
MP,EX,1,193000,	! tonne s^-2 mm^-1
MP,NUXY,1,0.31,
MP,MURX,1,1,

Temperature = 'TEMP' ! Temperature
MP,DENS,2,7.75e-09,	! tonne mm^-3
MP,ALPX,2,1.7e-05,	! C^-1
MP,C,2,480000000,	! mm^2 s^-2 C^-1
MP,KXX,2,15.1,	! tonne mm s^-3 C^-1
MP,RSVX,2,0.00077,	! ohm mm
MP,EX,2,193000,	! tonne s^-2 mm^-1
MP,NUXY,2,0.31,
MP,MURX,2,1,

Temperature = 'TEMP' ! Temperature
MP,DENS,3,7.75e-09,	! tonne mm^-3
MP,ALPX,3,1.7e-05,	! C^-1
MP,C,3,480000000,	! mm^2 s^-2 C^-1
MP,KXX,3,15.1,	! tonne mm s^-3 C^-1
MP,RSVX,3,0.00077,	! ohm mm
MP,EX,3,193000,	! tonne s^-2 mm^-1
MP,NUXY,3,0.31,
MP,MURX,3,1,

Temperature = 'TEMP' ! Temperature
MP,DENS,4,7.75e-09,	! tonne mm^-3
MP,ALPX,4,1.7e-05,	! C^-1
MP,C,4,480000000,	! mm^2 s^-2 C^-1
MP,KXX,4,15.1,	! tonne mm s^-3 C^-1
MP,RSVX,4,0.00077,	! ohm mm
MP,EX,4,193000,	! tonne s^-2 mm^-1
MP,NUXY,4,0.31,
MP,MURX,4,1,

Temperature = 'TEMP' ! Temperature
MP,DENS,5,7.75e-09,	! tonne mm^-3
MP,ALPX,5,1.7e-05,	! C^-1
MP,C,5,480000000,	! mm^2 s^-2 C^-1
MP,KXX,5,15.1,	! tonne mm s^-3 C^-1
MP,RSVX,5,0.00077,	! ohm mm
MP,EX,5,193000,	! tonne s^-2 mm^-1
MP,NUXY,5,0.31,
MP,MURX,5,1,

Temperature = 'TEMP' ! Temperature
MP,DENS,6,7.75e-09,	! tonne mm^-3
MP,ALPX,6,1.7e-05,	! C^-1
MP,C,6,480000000,	! mm^2 s^-2 C^-1
MP,KXX,6,15.1,	! tonne mm s^-3 C^-1
MP,RSVX,6,0.00077,	! ohm mm
MP,EX,6,193000,	! tonne s^-2 mm^-1
MP,NUXY,6,0.31,
MP,MURX,6,1,

Temperature = 'TEMP' ! Temperature
MP,DENS,7,2.77e-09,	! tonne mm^-3
MP,ALPX,7,2.3e-05,	! C^-1
MP,C,7,875000000,	! mm^2 s^-2 C^-1
MPTEMP,,,,,,,,
MPTEMP,1,-100
MPTEMP,2,0
MPTEMP,3,100
MPTEMP,4,200
MPDATA,KXX,7, ,114,144,165,175,	! tonne mm s^-3 C^-1
MPTEMP,,,,,,,,
MPTEMP,,,,,,,,
MPTEMP,1,0
MPTEMP,2,20
MPTEMP,3,100
MPDATA,RSVX,7, ,2.43e-05,2.67e-05,3.63e-05,	! ohm mm
MPTEMP,,,,,,,,
MP,EX,7,71000,	! tonne s^-2 mm^-1
MP,NUXY,7,0.33,
MP,MURX,7,1,

MP,DENS,8,7.85e-09,	! tonne mm^-3
MP,EX,8,205000,	! tonne s^-2 mm^-1
MP,NUXY,8,0.3,

!************************* Model Summary ********************
!bolt11,	不锈钢,	matid,	1
!bolt8,	不锈钢,	matid,	2
!bolt9,	不锈钢,	matid,	3
!bolt10,	不锈钢,	matid,	4
!bolt7,	不锈钢,	matid,	5
!bolt12,	不锈钢,	matid,	6
!up,	铝合金,	matid,	7
!down,	Q235,	matid,	8
!************************* End Model Summary ********************
/com,*********** Create Contact "摩擦的 - bolt11_down 至 up_up" ***********
*set,tid,10
*set,cid,9
r,tid
r,cid
et,tid,170
et,cid,174
eblock,10,,,24
(15i9)
    16640       10       10       10        0    18896    18906    18895    18895    19532    19521    18895    19520
    16641       10       10       10        0    18871    18909    18894    18894    19390    19512    18894    19388
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-1
eblock,10,,,24
(15i9)
    16664        9        9        9        0    18896    18906    18895    18895    19532    19521    18895    19520
    16665        9        9        9        0    18871    18909    18894    18894    19390    19512    18894    19388
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-1
eblock,10,,,146
(15i9)
    16688        9       10        9        0       46      137      947      947     1530     2135      947     1538
    16689        9       10        9        0      145      144      130      130     2186     2091      130     2092
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-1
eblock,10,,,146
(15i9)
    16834       10        9       10        0       46      137      947      947     1530     2135      947     1538
    16835       10        9       10        0      145      144      130      130     2186     2091      130     2092
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-1
keyo,cid,8,2               ! auto create asymmetric contact (from Program Controlled setting)
keyo,cid,10,0              ! adjust contact stiffness each NR iteration (from Program Controlled setting)
keyo,cid,12,0              ! standard contact
mp,mu,cid,0.15      ! unitless
keyo,cid,18,1              ! small sliding turned on by application
keyo,cid,2,0               ! augmented Lagrange (from Program Controlled setting)
keyo,cid,4,0               ! on Gauss point (from Program Controlled setting)
keyo,cid,9,0               ! use real geometry with stepped effects
keyo,cid,7,0               ! No Prediction
rmod,tid,3,1.       ! FKN
rmod,tid,5,0.       ! ICONT
rmod,tid,6,0.       ! PINB
rmod,tid,10,0.      ! CNOF
rmod,tid,12,0.      ! FKT
rmod,tid,36,91      ! WB DSID
rmod,cid,3,1.       ! FKN
rmod,cid,5,0.       ! ICONT
rmod,cid,6,0.       ! PINB
rmod,cid,10,0.      ! CNOF
rmod,cid,12,0.      ! FKT
rmod,cid,36,91      ! WB DSID
/com,*********** Create Contact "摩擦的 - bolt8_down 至 up_up" ***********
*set,tid,12
*set,cid,11
r,tid
r,cid
et,tid,170
et,cid,174
eblock,10,,,24
(15i9)
    16980       12       12       12        0    15152    15162    15151    15151    15788    15777    15151    15776
    16981       12       12       12        0    15127    15165    15150    15150    15646    15768    15150    15644
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-1
eblock,10,,,24
(15i9)
    17004       11       11       11        0    15152    15162    15151    15151    15788    15777    15151    15776
    17005       11       11       11        0    15127    15165    15150    15150    15646    15768    15150    15644
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-1
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eblock,10,,,146
(15i9)
    17174       12       11       12        0       46      137      947      947     1530     2135      947     1538
    17175       12       11       12        0      145      144      130      130     2186     2091      130     2092
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-1
keyo,cid,8,2               ! auto create asymmetric contact (from Program Controlled setting)
keyo,cid,10,0              ! adjust contact stiffness each NR iteration (from Program Controlled setting)
keyo,cid,12,0              ! standard contact
mp,mu,cid,0.15      ! unitless
keyo,cid,18,1              ! small sliding turned on by application
keyo,cid,2,0               ! augmented Lagrange (from Program Controlled setting)
keyo,cid,4,0               ! on Gauss point (from Program Controlled setting)
keyo,cid,9,0               ! use real geometry with stepped effects
keyo,cid,7,0               ! No Prediction
rmod,tid,3,1.       ! FKN
rmod,tid,5,0.       ! ICONT
rmod,tid,6,0.       ! PINB
rmod,tid,10,0.      ! CNOF
rmod,tid,12,0.      ! FKT
rmod,tid,36,94      ! WB DSID
rmod,cid,3,1.       ! FKN
rmod,cid,5,0.       ! ICONT
rmod,cid,6,0.       ! PINB
rmod,cid,10,0.      ! CNOF
rmod,cid,12,0.      ! FKT
rmod,cid,36,94      ! WB DSID
/com,*********** Create Contact "摩擦的 - bolt9_down 至 up_up" ***********
*set,tid,14
*set,cid,13
r,tid
r,cid
et,tid,170
et,cid,174
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eblock,10,,,146
(15i9)
    17514       14       13       14        0       46      137      947      947     1530     2135      947     1538
    17515       14       13       14        0      145      144      130      130     2186     2091      130     2092
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-1
keyo,cid,8,2               ! auto create asymmetric contact (from Program Controlled setting)
keyo,cid,10,0              ! adjust contact stiffness each NR iteration (from Program Controlled setting)
keyo,cid,12,0              ! standard contact
mp,mu,cid,0.15      ! unitless
keyo,cid,18,1              ! small sliding turned on by application
keyo,cid,2,0               ! augmented Lagrange (from Program Controlled setting)
keyo,cid,4,0               ! on Gauss point (from Program Controlled setting)
keyo,cid,9,0               ! use real geometry with stepped effects
keyo,cid,7,0               ! No Prediction
rmod,tid,3,1.       ! FKN
rmod,tid,5,0.       ! ICONT
rmod,tid,6,0.       ! PINB
rmod,tid,10,0.      ! CNOF
rmod,tid,12,0.      ! FKT
rmod,tid,36,97      ! WB DSID
rmod,cid,3,1.       ! FKN
rmod,cid,5,0.       ! ICONT
rmod,cid,6,0.       ! PINB
rmod,cid,10,0.      ! CNOF
rmod,cid,12,0.      ! FKT
rmod,cid,36,97      ! WB DSID
/com,*********** Create Contact "摩擦的 - bolt10_down 至 up_up" ***********
*set,tid,16
*set,cid,15
r,tid
r,cid
et,tid,170
et,cid,174
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eblock,10,,,146
(15i9)
    17854       16       15       16        0       46      137      947      947     1530     2135      947     1538
    17855       16       15       16        0      145      144      130      130     2186     2091      130     2092
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-1
keyo,cid,8,2               ! auto create asymmetric contact (from Program Controlled setting)
keyo,cid,10,0              ! adjust contact stiffness each NR iteration (from Program Controlled setting)
keyo,cid,12,0              ! standard contact
mp,mu,cid,0.15      ! unitless
keyo,cid,18,1              ! small sliding turned on by application
keyo,cid,2,0               ! augmented Lagrange (from Program Controlled setting)
keyo,cid,4,0               ! on Gauss point (from Program Controlled setting)
keyo,cid,9,0               ! use real geometry with stepped effects
keyo,cid,7,0               ! No Prediction
rmod,tid,3,1.       ! FKN
rmod,tid,5,0.       ! ICONT
rmod,tid,6,0.       ! PINB
rmod,tid,10,0.      ! CNOF
rmod,tid,12,0.      ! FKT
rmod,tid,36,100     ! WB DSID
rmod,cid,3,1.       ! FKN
rmod,cid,5,0.       ! ICONT
rmod,cid,6,0.       ! PINB
rmod,cid,10,0.      ! CNOF
rmod,cid,12,0.      ! FKT
rmod,cid,36,100     ! WB DSID
/com,*********** Create Contact "摩擦的 - bolt7_down 至 up_up" ***********
*set,tid,18
*set,cid,17
r,tid
r,cid
et,tid,170
et,cid,174
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eblock,10,,,146
(15i9)
    18194       18       17       18        0       46      137      947      947     1530     2135      947     1538
    18195       18       17       18        0      145      144      130      130     2186     2091      130     2092
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-1
keyo,cid,8,2               ! auto create asymmetric contact (from Program Controlled setting)
keyo,cid,10,0              ! adjust contact stiffness each NR iteration (from Program Controlled setting)
keyo,cid,12,0              ! standard contact
mp,mu,cid,0.15      ! unitless
keyo,cid,18,1              ! small sliding turned on by application
keyo,cid,2,0               ! augmented Lagrange (from Program Controlled setting)
keyo,cid,4,0               ! on Gauss point (from Program Controlled setting)
keyo,cid,9,0               ! use real geometry with stepped effects
keyo,cid,7,0               ! No Prediction
rmod,tid,3,1.       ! FKN
rmod,tid,5,0.       ! ICONT
rmod,tid,6,0.       ! PINB
rmod,tid,10,0.      ! CNOF
rmod,tid,12,0.      ! FKT
rmod,tid,36,103     ! WB DSID
rmod,cid,3,1.       ! FKN
rmod,cid,5,0.       ! ICONT
rmod,cid,6,0.       ! PINB
rmod,cid,10,0.      ! CNOF
rmod,cid,12,0.      ! FKT
rmod,cid,36,103     ! WB DSID
/com,*********** Create Contact "摩擦的 - bolt12_down 至 up_up" ***********
*set,tid,20
*set,cid,19
r,tid
r,cid
et,tid,170
et,cid,174
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eblock,10,,,146
(15i9)
    18534       20       19       20        0       46      137      947      947     1530     2135      947     1538
    18535       20       19       20        0      145      144      130      130     2186     2091      130     2092
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-1
keyo,cid,8,2               ! auto create asymmetric contact (from Program Controlled setting)
keyo,cid,10,0              ! adjust contact stiffness each NR iteration (from Program Controlled setting)
keyo,cid,12,0              ! standard contact
mp,mu,cid,0.15      ! unitless
keyo,cid,18,1              ! small sliding turned on by application
keyo,cid,2,0               ! augmented Lagrange (from Program Controlled setting)
keyo,cid,4,0               ! on Gauss point (from Program Controlled setting)
keyo,cid,9,0               ! use real geometry with stepped effects
keyo,cid,7,0               ! No Prediction
rmod,tid,3,1.       ! FKN
rmod,tid,5,0.       ! ICONT
rmod,tid,6,0.       ! PINB
rmod,tid,10,0.      ! CNOF
rmod,tid,12,0.      ! FKT
rmod,tid,36,106     ! WB DSID
rmod,cid,3,1.       ! FKN
rmod,cid,5,0.       ! ICONT
rmod,cid,6,0.       ! PINB
rmod,cid,10,0.      ! CNOF
rmod,cid,12,0.      ! FKT
rmod,cid,36,106     ! WB DSID
/com,*********** Create Contact "摩擦的 - up_A 至 down_E" ***********
*set,tid,22
*set,cid,21
r,tid
r,cid
et,tid,170
et,cid,174
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eblock,10,,,75
(15i9)
    18895       22       21       22        0     7959     7960     7961     7961    14051    14057     7961    14052
    18896       22       21       22        0     7338     7430     7431     7431    10657    11065     7431    10658
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-1
keyo,cid,8,2               ! auto create asymmetric contact (from Program Controlled setting)
keyo,cid,10,0              ! adjust contact stiffness each NR iteration (from Program Controlled setting)
keyo,cid,12,0              ! standard contact
mp,mu,cid,0.15      ! unitless
keyo,cid,18,1              ! small sliding turned on by application
keyo,cid,2,0               ! augmented Lagrange (from Program Controlled setting)
keyo,cid,4,0               ! on Gauss point (from Program Controlled setting)
keyo,cid,9,3		! include user offset only (not geometric gaps/penetration), with stepped effects
keyo,cid,7,0               ! No Prediction
keyo,cid,15,3				 ! Damping is activated at all times regardless of the contact status of previous substeps
rmod,tid,3,1.       ! FKN
rmod,tid,5,0.       ! ICONT
rmod,tid,6,-0.4     ! PINB
rmod,tid,10,0.      ! CNOF
rmod,tid,12,0.      ! FKT
rmod,tid,31,0.1     ! FDMN
rmod,tid,36,133     ! WB DSID
rmod,cid,3,1.       ! FKN
rmod,cid,5,0.       ! ICONT
rmod,cid,6,-0.4     ! PINB
rmod,cid,10,0.      ! CNOF
rmod,cid,12,0.      ! FKT
rmod,cid,31,0.1     ! FDMN
rmod,cid,36,133     ! WB DSID
/com,*********** Create Contact "摩擦的 - up_C 至 down_C" ***********
*set,tid,24
*set,cid,23
r,tid
r,cid
et,tid,170
et,cid,174
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eblock,10,,,73
(15i9)
    19191       24       23       24        0     7993     7997     7994     7994    14217    14221     7994    14215
    19192       24       23       24        0     7995     7997     7999     7999    14228    14241     7999    14229
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-1
keyo,cid,8,2               ! auto create asymmetric contact (from Program Controlled setting)
keyo,cid,10,0              ! adjust contact stiffness each NR iteration (from Program Controlled setting)
keyo,cid,12,0              ! standard contact
mp,mu,cid,0.15      ! unitless
keyo,cid,18,1              ! small sliding turned on by application
keyo,cid,2,0               ! augmented Lagrange (from Program Controlled setting)
keyo,cid,4,0               ! on Gauss point (from Program Controlled setting)
keyo,cid,9,3		! include user offset only (not geometric gaps/penetration), with stepped effects
keyo,cid,7,0               ! No Prediction
keyo,cid,15,3				 ! Damping is activated at all times regardless of the contact status of previous substeps
rmod,tid,3,1.       ! FKN
rmod,tid,5,0.       ! ICONT
rmod,tid,6,-0.4     ! PINB
rmod,tid,10,0.      ! CNOF
rmod,tid,12,0.      ! FKT
rmod,tid,31,0.1     ! FDMN
rmod,tid,36,136     ! WB DSID
rmod,cid,3,1.       ! FKN
rmod,cid,5,0.       ! ICONT
rmod,cid,6,-0.4     ! PINB
rmod,cid,10,0.      ! CNOF
rmod,cid,12,0.      ! FKT
rmod,cid,31,0.1     ! FDMN
rmod,cid,36,136     ! WB DSID
/com,*********** Create Contact "摩擦的 - up_D 至 down_B" ***********
*set,tid,26
*set,cid,25
r,tid
r,cid
et,tid,170
et,cid,174
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eblock,10,,,75
(15i9)
    19479       26       25       26        0     8008     8023     8013     8013    14287    14321     8013    14284
    19480       26       25       26        0     8009     8015     8018     8018    14291    14331     8018    14292
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-1
keyo,cid,8,2               ! auto create asymmetric contact (from Program Controlled setting)
keyo,cid,10,0              ! adjust contact stiffness each NR iteration (from Program Controlled setting)
keyo,cid,12,0              ! standard contact
mp,mu,cid,0.15      ! unitless
keyo,cid,18,1              ! small sliding turned on by application
keyo,cid,2,0               ! augmented Lagrange (from Program Controlled setting)
keyo,cid,4,0               ! on Gauss point (from Program Controlled setting)
keyo,cid,9,3		! include user offset only (not geometric gaps/penetration), with stepped effects
keyo,cid,7,0               ! No Prediction
keyo,cid,15,3				 ! Damping is activated at all times regardless of the contact status of previous substeps
rmod,tid,3,1.       ! FKN
rmod,tid,5,0.       ! ICONT
rmod,tid,6,-0.4     ! PINB
rmod,tid,10,0.      ! CNOF
rmod,tid,12,0.      ! FKT
rmod,tid,31,0.1     ! FDMN
rmod,tid,36,139     ! WB DSID
rmod,cid,3,1.       ! FKN
rmod,cid,5,0.       ! ICONT
rmod,cid,6,-0.4     ! PINB
rmod,cid,10,0.      ! CNOF
rmod,cid,12,0.      ! FKT
rmod,cid,31,0.1     ! FDMN
rmod,cid,36,139     ! WB DSID
/com,*********** Create Contact "摩擦的 - up_F 至 down_F" ***********
*set,tid,28
*set,cid,27
r,tid
r,cid
et,tid,170
et,cid,174
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eblock,10,,,73
(15i9)
    19775       28       27       28        0     7935     7940     7945     7945    13920    13954     7945    13923
    19776       28       27       28        0     7938     7945     7948     7948    13941    13980     7948    13942
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-1
keyo,cid,8,2               ! auto create asymmetric contact (from Program Controlled setting)
keyo,cid,10,0              ! adjust contact stiffness each NR iteration (from Program Controlled setting)
keyo,cid,12,0              ! standard contact
mp,mu,cid,0.15      ! unitless
keyo,cid,18,1              ! small sliding turned on by application
keyo,cid,2,0               ! augmented Lagrange (from Program Controlled setting)
keyo,cid,4,0               ! on Gauss point (from Program Controlled setting)
keyo,cid,9,3		! include user offset only (not geometric gaps/penetration), with stepped effects
keyo,cid,7,0               ! No Prediction
keyo,cid,15,3				 ! Damping is activated at all times regardless of the contact status of previous substeps
rmod,tid,3,1.       ! FKN
rmod,tid,5,0.       ! ICONT
rmod,tid,6,-0.4     ! PINB
rmod,tid,10,0.      ! CNOF
rmod,tid,12,0.      ! FKT
rmod,tid,31,0.1     ! FDMN
rmod,tid,36,142     ! WB DSID
rmod,cid,3,1.       ! FKN
rmod,cid,5,0.       ! ICONT
rmod,cid,6,-0.4     ! PINB
rmod,cid,10,0.      ! CNOF
rmod,cid,12,0.      ! FKT
rmod,cid,31,0.1     ! FDMN
rmod,cid,36,142     ! WB DSID
/com,*********** Create Contact "摩擦的 - up_E 至 down_A" ***********
*set,tid,30
*set,cid,29
r,tid
r,cid
et,tid,170
et,cid,174
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eblock,10,,,79
(15i9)
    20075       30       29       30        0     8028     8031     8035     8035    14383    14403     8035    14385
    20076       30       29       30        0     8034     8036     8032     8032    14418    14409     8032    14408
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-1
keyo,cid,8,2               ! auto create asymmetric contact (from Program Controlled setting)
keyo,cid,10,0              ! adjust contact stiffness each NR iteration (from Program Controlled setting)
keyo,cid,12,0              ! standard contact
mp,mu,cid,0.15      ! unitless
keyo,cid,18,1              ! small sliding turned on by application
keyo,cid,2,0               ! augmented Lagrange (from Program Controlled setting)
keyo,cid,4,0               ! on Gauss point (from Program Controlled setting)
keyo,cid,9,3		! include user offset only (not geometric gaps/penetration), with stepped effects
keyo,cid,7,0               ! No Prediction
keyo,cid,15,3				 ! Damping is activated at all times regardless of the contact status of previous substeps
rmod,tid,3,1.       ! FKN
rmod,tid,5,0.       ! ICONT
rmod,tid,6,-0.4     ! PINB
rmod,tid,10,0.      ! CNOF
rmod,tid,12,0.      ! FKT
rmod,tid,31,0.1     ! FDMN
rmod,tid,36,145     ! WB DSID
rmod,cid,3,1.       ! FKN
rmod,cid,5,0.       ! ICONT
rmod,cid,6,-0.4     ! PINB
rmod,cid,10,0.      ! CNOF
rmod,cid,12,0.      ! FKT
rmod,cid,31,0.1     ! FDMN
rmod,cid,36,145     ! WB DSID
/com,*********** Create Contact "摩擦的 - up_B 至 down_D" ***********
*set,tid,32
*set,cid,31
r,tid
r,cid
et,tid,170
et,cid,174
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eblock,10,,,79
(15i9)
    20381       32       31       32        0     7977     7983     7980     7980    14137    14148     7980    14136
    20382       32       31       32        0     7971     7974     7986     7986    14098    14122     7986    14100
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-1
keyo,cid,8,2               ! auto create asymmetric contact (from Program Controlled setting)
keyo,cid,10,0              ! adjust contact stiffness each NR iteration (from Program Controlled setting)
keyo,cid,12,0              ! standard contact
mp,mu,cid,0.15      ! unitless
keyo,cid,18,1              ! small sliding turned on by application
keyo,cid,2,0               ! augmented Lagrange (from Program Controlled setting)
keyo,cid,4,0               ! on Gauss point (from Program Controlled setting)
keyo,cid,9,4               ! include user offset only (not geometric gaps/penetration), with ramped effects
keyo,cid,7,0               ! No Prediction
keyo,cid,15,3				 ! Damping is activated at all times regardless of the contact status of previous substeps
rmod,tid,3,1.       ! FKN
rmod,tid,5,0.       ! ICONT
rmod,tid,6,-0.4     ! PINB
rmod,tid,10,0.      ! CNOF
rmod,tid,12,0.      ! FKT
rmod,tid,31,0.1     ! FDMN
rmod,tid,36,148     ! WB DSID
rmod,cid,3,1.       ! FKN
rmod,cid,5,0.       ! ICONT
rmod,cid,6,-0.4     ! PINB
rmod,cid,10,0.      ! CNOF
rmod,cid,12,0.      ! FKT
rmod,cid,31,0.1     ! FDMN
rmod,cid,36,148     ! WB DSID
/com,*********** Create Contact "绑定 - bolt_11 至 down_11" ***********
*set,tid,34
*set,cid,33
r,tid
r,cid
et,tid,170
et,cid,174
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eblock,10,,,22
(15i9)
    20632       34       33       34        0     7164     7160     7662     7662     9690     9692     7662     9713
    20633       34       33       34        0     7162     7165     7663     7663     9703     9715     7663     9705
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-1
keyo,cid,8,2               ! auto create asymmetric contact (from Program Controlled setting)
keyo,cid,10,0              ! adjust contact stiffness each NR iteration (from Program Controlled setting)
keyo,cid,12,5              ! bonded always
keyo,cid,18,1              ! small sliding turned on by application
keyo,cid,2,0               ! augmented Lagrange (from Program Controlled setting)
keyo,cid,4,0               ! on Gauss point (from Program Controlled setting)
keyo,cid,9,1               ! ignore initial gaps/penetration
keyo,cid,7,0               ! No Prediction
rmod,tid,3,1.       ! FKN
rmod,tid,5,0.       ! ICONT
rmod,tid,6,0.       ! PINB
rmod,tid,10,0.      ! CNOF
rmod,tid,12,0.      ! FKT
rmod,tid,36,181     ! WB DSID
rmod,cid,3,1.       ! FKN
rmod,cid,5,0.       ! ICONT
rmod,cid,6,0.       ! PINB
rmod,cid,10,0.      ! CNOF
rmod,cid,12,0.      ! FKT
rmod,cid,36,181     ! WB DSID
/com,*********** Create Contact "绑定 - bolt_8 至 down_8" ***********
*set,tid,36
*set,cid,35
r,tid
r,cid
et,tid,170
et,cid,174
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eblock,10,,,24
(15i9)
    20828       36       35       36        0     7178     7181     7670     7670     9776     9789     7670     9778
    20829       36       35       36        0     7180     7176     7669     7669     9765     9767     7669     9786
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-1
keyo,cid,8,2               ! auto create asymmetric contact (from Program Controlled setting)
keyo,cid,10,0              ! adjust contact stiffness each NR iteration (from Program Controlled setting)
keyo,cid,12,5              ! bonded always
keyo,cid,18,1              ! small sliding turned on by application
keyo,cid,2,0               ! augmented Lagrange (from Program Controlled setting)
keyo,cid,4,0               ! on Gauss point (from Program Controlled setting)
keyo,cid,9,1               ! ignore initial gaps/penetration
keyo,cid,7,0               ! No Prediction
rmod,tid,3,1.       ! FKN
rmod,tid,5,0.       ! ICONT
rmod,tid,6,0.       ! PINB
rmod,tid,10,0.      ! CNOF
rmod,tid,12,0.      ! FKT
rmod,tid,36,184     ! WB DSID
rmod,cid,3,1.       ! FKN
rmod,cid,5,0.       ! ICONT
rmod,cid,6,0.       ! PINB
rmod,cid,10,0.      ! CNOF
rmod,cid,12,0.      ! FKT
rmod,cid,36,184     ! WB DSID
/com,*********** Create Contact "绑定 - bolt_9 至 down_9" ***********
*set,tid,38
*set,cid,37
r,tid
r,cid
et,tid,170
et,cid,174
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eblock,10,,,24
(15i9)
    21026       38       37       38        0     7184     7191     7672     7672     9805     9834     7672     9806
    21027       38       37       38        0     7190     7186     7673     7673     9817     9818     7673     9831
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-1
keyo,cid,8,2               ! auto create asymmetric contact (from Program Controlled setting)
keyo,cid,10,0              ! adjust contact stiffness each NR iteration (from Program Controlled setting)
keyo,cid,12,5              ! bonded always
keyo,cid,18,1              ! small sliding turned on by application
keyo,cid,2,0               ! augmented Lagrange (from Program Controlled setting)
keyo,cid,4,0               ! on Gauss point (from Program Controlled setting)
keyo,cid,9,1               ! ignore initial gaps/penetration
keyo,cid,7,0               ! No Prediction
rmod,tid,3,1.       ! FKN
rmod,tid,5,0.       ! ICONT
rmod,tid,6,0.       ! PINB
rmod,tid,10,0.      ! CNOF
rmod,tid,12,0.      ! FKT
rmod,tid,36,187     ! WB DSID
rmod,cid,3,1.       ! FKN
rmod,cid,5,0.       ! ICONT
rmod,cid,6,0.       ! PINB
rmod,cid,10,0.      ! CNOF
rmod,cid,12,0.      ! FKT
rmod,cid,36,187     ! WB DSID
/com,*********** Create Contact "绑定 - bolt_10 至 down_10" ***********
*set,tid,40
*set,cid,39
r,tid
r,cid
et,tid,170
et,cid,174
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eblock,10,,,22
(15i9)
    21222       40       39       40        0     7659     7159     7277     7277     9686     9685     7277    10359
    21223       40       39       40        0     7273     7277     7661     7661    10345    10360     7661    10346
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-1
keyo,cid,8,2               ! auto create asymmetric contact (from Program Controlled setting)
keyo,cid,10,0              ! adjust contact stiffness each NR iteration (from Program Controlled setting)
keyo,cid,12,5              ! bonded always
keyo,cid,18,1              ! small sliding turned on by application
keyo,cid,2,0               ! augmented Lagrange (from Program Controlled setting)
keyo,cid,4,0               ! on Gauss point (from Program Controlled setting)
keyo,cid,9,1               ! ignore initial gaps/penetration
keyo,cid,7,0               ! No Prediction
rmod,tid,3,1.       ! FKN
rmod,tid,5,0.       ! ICONT
rmod,tid,6,0.       ! PINB
rmod,tid,10,0.      ! CNOF
rmod,tid,12,0.      ! FKT
rmod,tid,36,190     ! WB DSID
rmod,cid,3,1.       ! FKN
rmod,cid,5,0.       ! ICONT
rmod,cid,6,0.       ! PINB
rmod,cid,10,0.      ! CNOF
rmod,cid,12,0.      ! FKT
rmod,cid,36,190     ! WB DSID
/com,*********** Create Contact "绑定 - bolt_7 至 down_7" ***********
*set,tid,42
*set,cid,41
r,tid
r,cid
et,tid,170
et,cid,174
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eblock,10,,,24
(15i9)
    21418       42       41       42        0     7146     7143     7675     7675     9601     9603     7675     9618
    21419       42       41       42        0     7143     7147     7675     7675     9602     9622     7675     9603
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-1
keyo,cid,8,2               ! auto create asymmetric contact (from Program Controlled setting)
keyo,cid,10,0              ! adjust contact stiffness each NR iteration (from Program Controlled setting)
keyo,cid,12,5              ! bonded always
keyo,cid,18,1              ! small sliding turned on by application
keyo,cid,2,0               ! augmented Lagrange (from Program Controlled setting)
keyo,cid,4,0               ! on Gauss point (from Program Controlled setting)
keyo,cid,9,1               ! ignore initial gaps/penetration
keyo,cid,7,0               ! No Prediction
rmod,tid,3,1.       ! FKN
rmod,tid,5,0.       ! ICONT
rmod,tid,6,0.       ! PINB
rmod,tid,10,0.      ! CNOF
rmod,tid,12,0.      ! FKT
rmod,tid,36,193     ! WB DSID
rmod,cid,3,1.       ! FKN
rmod,cid,5,0.       ! ICONT
rmod,cid,6,0.       ! PINB
rmod,cid,10,0.      ! CNOF
rmod,cid,12,0.      ! FKT
rmod,cid,36,193     ! WB DSID
/com,*********** Create Contact "绑定 - bolt_12 至 down_12" ***********
*set,tid,44
*set,cid,43
r,tid
r,cid
et,tid,170
et,cid,174
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eblock,10,,,24
(15i9)
    21616       44       43       44        0     7173     7169     7665     7665     9735     9736     7665     9751
    21617       44       43       44        0     7169     7172     7665     7665     9734     9748     7665     9736
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-1
keyo,cid,8,2               ! auto create asymmetric contact (from Program Controlled setting)
keyo,cid,10,0              ! adjust contact stiffness each NR iteration (from Program Controlled setting)
keyo,cid,12,5              ! bonded always
keyo,cid,18,1              ! small sliding turned on by application
keyo,cid,2,0               ! augmented Lagrange (from Program Controlled setting)
keyo,cid,4,0               ! on Gauss point (from Program Controlled setting)
keyo,cid,9,1               ! ignore initial gaps/penetration
keyo,cid,7,0               ! No Prediction
rmod,tid,3,1.       ! FKN
rmod,tid,5,0.       ! ICONT
rmod,tid,6,0.       ! PINB
rmod,tid,10,0.      ! CNOF
rmod,tid,12,0.      ! FKT
rmod,tid,36,196     ! WB DSID
rmod,cid,3,1.       ! FKN
rmod,cid,5,0.       ! ICONT
rmod,cid,6,0.       ! PINB
rmod,cid,10,0.      ! CNOF
rmod,cid,12,0.      ! FKT
rmod,cid,36,196     ! WB DSID
nsel,all
esel,all
/com,*********** Send Named Selection as Node Component ***********
CMBLOCK,UP_UP   ,NODE,      384
(8i10)
        35        36        37        38        39        40        41        42
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
/com,*********** Send Named Selection as Node Component ***********
CMBLOCK,BOLT11_DOWN,NODE,       72
(8i10)
     18866     18867     18868     18869     18870     18871     18872     18873
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
/com,*********** Send Named Selection as Node Component ***********
CMBLOCK,BOLT8_DOWN,NODE,       72
(8i10)
     15122     15123     15124     15125     15126     15127     15128     15129
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
/com,*********** Send Named Selection as Node Component ***********
CMBLOCK,BOLT9_DOWN,NODE,       72
(8i10)
     16058     16059     16060     16061     16062     16063     16064     16065
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
/com,*********** Send Named Selection as Node Component ***********
CMBLOCK,BOLT10_DOWN,NODE,       72
(8i10)
     16994     16995     16996     16997     16998     16999     17000     17001
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
/com,*********** Send Named Selection as Node Component ***********
CMBLOCK,BOLT7_DOWN,NODE,       72
(8i10)
     17930     17931     17932     17933     17934     17935     17936     17937
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
/com,*********** Send Named Selection as Node Component ***********
CMBLOCK,BOLT12_DOWN,NODE,       72
(8i10)
     19802     19803     19804     19805     19806     19807     19808     19809
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
/com,*********** Send Named Selection as Node Component ***********
CMBLOCK,UP_A    ,NODE,      180
(8i10)
        79        80        81        82       185       186       187       188
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/com,*********** Send Named Selection as Node Component ***********
CMBLOCK,UP_B    ,NODE,      188
(8i10)
        73        74        75        76       193       194       195       196
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/com,*********** Send Named Selection as Node Component ***********
CMBLOCK,UP_C    ,NODE,      188
(8i10)
        67        68        69        70       201       202       203       204
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/com,*********** Send Named Selection as Node Component ***********
CMBLOCK,UP_D    ,NODE,      180
(8i10)
        61        62        63        64       209       210       211       212
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/com,*********** Send Named Selection as Node Component ***********
CMBLOCK,UP_E    ,NODE,      188
(8i10)
        55        56        57        58       169       170       171       172
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/com,*********** Send Named Selection as Node Component ***********
CMBLOCK,UP_F    ,NODE,      188
(8i10)
        85        86        87        88       177       178       179       180
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/com,*********** Send Named Selection as Node Component ***********
CMBLOCK,DOWN_E  ,NODE,      189
(8i10)
      7031      7032      7033      7132      7133      7134      7135      7136
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/com,*********** Send Named Selection as Node Component ***********
CMBLOCK,DOWN_F  ,NODE,      185
(8i10)
      7029      7056      7057      7092      7093      7094      7095      7096
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/com,*********** Send Named Selection as Node Component ***********
CMBLOCK,DOWN_A  ,NODE,      197
(8i10)
      7051      7052      7053      7100      7101      7102      7103      7104
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/com,*********** Send Named Selection as Node Component ***********
CMBLOCK,DOWN_B  ,NODE,      189
(8i10)
      7046      7047      7048      7108      7109      7110      7111      7112
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/com,*********** Send Named Selection as Node Component ***********
CMBLOCK,DOWN_C  ,NODE,      185
(8i10)
      7041      7042      7043      7116      7117      7118      7119      7120
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/com,*********** Send Named Selection as Node Component ***********
CMBLOCK,DOWN_D  ,NODE,      197
(8i10)
      7036      7037      7038      7124      7125      7126      7127      7128
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/com,*********** Send Named Selection as Node Component ***********
CMBLOCK,BOLT_11 ,NODE,      165
(8i10)
     18882     18883     18884     18885     18886     18887     18888     18889
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/com,*********** Send Named Selection as Node Component ***********
CMBLOCK,BOLT_8  ,NODE,      165
(8i10)
     15138     15139     15140     15141     15142     15143     15144     15145
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/com,*********** Send Named Selection as Node Component ***********
CMBLOCK,BOLT_9  ,NODE,      165
(8i10)
     16074     16075     16076     16077     16078     16079     16080     16081
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/com,*********** Send Named Selection as Node Component ***********
CMBLOCK,BOLT_10 ,NODE,      165
(8i10)
     17010     17011     17012     17013     17014     17015     17016     17017
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/com,*********** Send Named Selection as Node Component ***********
CMBLOCK,BOLT_7  ,NODE,      165
(8i10)
     17946     17947     17948     17949     17950     17951     17952     17953
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/com,*********** Send Named Selection as Node Component ***********
CMBLOCK,BOLT_12 ,NODE,      165
(8i10)
     19818     19819     19820     19821     19822     19823     19824     19825
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/com,*********** Send Named Selection as Node Component ***********
CMBLOCK,DOWN_11 ,NODE,       60
(8i10)
      7160      7161      7162      7163      7164      7165      7166      7167
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/com,*********** Send Named Selection as Node Component ***********
CMBLOCK,DOWN_8  ,NODE,       64
(8i10)
      7176      7177      7178      7179      7180      7181      7182      7183
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
/com,*********** Send Named Selection as Node Component ***********
CMBLOCK,DOWN_9  ,NODE,       64
(8i10)
      7184      7185      7186      7187      7188      7189      7190      7191
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
/com,*********** Send Named Selection as Node Component ***********
CMBLOCK,DOWN_10 ,NODE,       60
(8i10)
      7152      7153      7154      7155      7156      7157      7158      7159
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/com,*********** Send Named Selection as Node Component ***********
CMBLOCK,DOWN_7  ,NODE,       64
(8i10)
      7142      7143      7144      7145      7146      7147      7148      7149
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
/com,*********** Send Named Selection as Node Component ***********
CMBLOCK,DOWN_12 ,NODE,       64
(8i10)
      7168      7169      7170      7171      7172      7173      7174      7175
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
/com,*********** Fixed Supports ***********
CMBLOCK,_FIXEDSU,NODE,      108
(8i10)
      6970      6971      6972      6973      6974      6975      6976      6977
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cmsel,s,_FIXEDSU
d,all,all
nsel,all
/com,*********** Create Bolt Pretension "_____" ***********
*set,_pretnode,20666
_nbolt209 = 20666               ! that will be the pretension node number
local,11,1,-41.268297679865,-40.4209997084933,145.,0.,90.,0.
nmod,20666,0,0,0,,,,1      ! move pretension node to bolt center, don't update centroid
CMBLOCK,C0      ,NODE,      165
(8i10)
     17010     17011     17012     17013     17014     17015     17016     17017
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cmsel,s,C0
*get,_maxx,node,0,mxloc,x  ! get the radius of the cylinder
nsel,all                   ! select all nodes back because *get,CENTRX needs it
*set,_tid,45
et,_tid,179
type,_tid
real,_tid
mat,_tid
secnum,_tid
esel,s,type,,4
*get,_necurr,elem,,count    ! get number of elements on body
_ecurr=0                    ! seed value
*do,_i,1,_necurr
  _ecurr = ELNEXT(_ecurr)
  *get,_radius,elem,_ecurr,cent,x
  *if,_radius,gt,_maxx,then
    esel,u,elem,,_ecurr     ! unselect element since not inside cylinder radius
  *endif
*enddo
*set,_wbpstol,3.20631218268593e-002
*get,_echck1,elem,,num,max    ! make sure psmesh command was successful
psmesh,_tid,,20666,all,,11,z,0.0,,_wbpstol,_tid,cmebolt,cmnbolt
*get,_echck2,elem,,num,max    ! make sure psmesh command was successful
*if,_echck1,eq,_echck2,then
  *msg,error
  THE PRETENSION LOAD WAS NOT ABLE TO BE APPLIED. &
  MAKE SURE THE LOAD WAS NOT APPLIED TO A HOLE AND THAT &
  THE LOAD IS NOT APPLIED MORE THAN ONCE PER SURFACE
*endif
esel,all
nsel,all
csys,0
/com,*********** Create Bolt Pretension "_____ 2" ***********
*set,_pretnode,20667
_nbolt211 = 20667               ! that will be the pretension node number
local,11,1,2.03297250935687,-40.4209997084933,170.,0.,90.,0.
nmod,20667,0,0,0,,,,1      ! move pretension node to bolt center, don't update centroid
CMBLOCK,C1      ,NODE,      165
(8i10)
     17946     17947     17948     17949     17950     17951     17952     17953
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cmsel,s,C1
*get,_maxx,node,0,mxloc,x  ! get the radius of the cylinder
nsel,all                   ! select all nodes back because *get,CENTRX needs it
*set,_tid,46
et,_tid,179
type,_tid
real,_tid
mat,_tid
secnum,_tid
esel,s,type,,5
*get,_necurr,elem,,count    ! get number of elements on body
_ecurr=0                    ! seed value
*do,_i,1,_necurr
  _ecurr = ELNEXT(_ecurr)
  *get,_radius,elem,_ecurr,cent,x
  *if,_radius,gt,_maxx,then
    esel,u,elem,,_ecurr     ! unselect element since not inside cylinder radius
  *endif
*enddo
*set,_wbpstol,3.20631218268593e-002
*get,_echck1,elem,,num,max    ! make sure psmesh command was successful
psmesh,_tid,,20667,all,,11,z,0.0,,_wbpstol,_tid,cmebolt,cmnbolt
*get,_echck2,elem,,num,max    ! make sure psmesh command was successful
*if,_echck1,eq,_echck2,then
  *msg,error
  THE PRETENSION LOAD WAS NOT ABLE TO BE APPLIED. &
  MAKE SURE THE LOAD WAS NOT APPLIED TO A HOLE AND THAT &
  THE LOAD IS NOT APPLIED MORE THAN ONCE PER SURFACE
*endif
esel,all
nsel,all
csys,0
/com,*********** Create Bolt Pretension "_____ 3" ***********
*set,_pretnode,20668
_nbolt213 = 20668               ! that will be the pretension node number
local,11,1,-41.2682976798645,-40.4209997084933,95.,0.,90.,0.
nmod,20668,0,0,0,,,,1      ! move pretension node to bolt center, don't update centroid
CMBLOCK,C2      ,NODE,      165
(8i10)
     18882     18883     18884     18885     18886     18887     18888     18889
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cmsel,s,C2
*get,_maxx,node,0,mxloc,x  ! get the radius of the cylinder
nsel,all                   ! select all nodes back because *get,CENTRX needs it
*set,_tid,47
et,_tid,179
type,_tid
real,_tid
mat,_tid
secnum,_tid
esel,s,type,,1
*get,_necurr,elem,,count    ! get number of elements on body
_ecurr=0                    ! seed value
*do,_i,1,_necurr
  _ecurr = ELNEXT(_ecurr)
  *get,_radius,elem,_ecurr,cent,x
  *if,_radius,gt,_maxx,then
    esel,u,elem,,_ecurr     ! unselect element since not inside cylinder radius
  *endif
*enddo
*set,_wbpstol,3.01797471864188e-002
*get,_echck1,elem,,num,max    ! make sure psmesh command was successful
psmesh,_tid,,20668,all,,11,z,0.0,,_wbpstol,_tid,cmebolt,cmnbolt
*get,_echck2,elem,,num,max    ! make sure psmesh command was successful
*if,_echck1,eq,_echck2,then
  *msg,error
  THE PRETENSION LOAD WAS NOT ABLE TO BE APPLIED. &
  MAKE SURE THE LOAD WAS NOT APPLIED TO A HOLE AND THAT &
  THE LOAD IS NOT APPLIED MORE THAN ONCE PER SURFACE
*endif
esel,all
nsel,all
csys,0
/com,*********** Create Bolt Pretension "_____ 4" ***********
*set,_pretnode,20669
_nbolt215 = 20669               ! that will be the pretension node number
local,11,1,45.334242698579,-40.4209997084933,145.,0.,90.,0.
nmod,20669,0,0,0,,,,1      ! move pretension node to bolt center, don't update centroid
CMBLOCK,C3      ,NODE,      165
(8i10)
     16074     16075     16076     16077     16078     16079     16080     16081
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cmsel,s,C3
*get,_maxx,node,0,mxloc,x  ! get the radius of the cylinder
nsel,all                   ! select all nodes back because *get,CENTRX needs it
*set,_tid,48
et,_tid,179
type,_tid
real,_tid
mat,_tid
secnum,_tid
esel,s,type,,3
*get,_necurr,elem,,count    ! get number of elements on body
_ecurr=0                    ! seed value
*do,_i,1,_necurr
  _ecurr = ELNEXT(_ecurr)
  *get,_radius,elem,_ecurr,cent,x
  *if,_radius,gt,_maxx,then
    esel,u,elem,,_ecurr     ! unselect element since not inside cylinder radius
  *endif
*enddo
*set,_wbpstol,3.12242685346751e-002
*get,_echck1,elem,,num,max    ! make sure psmesh command was successful
psmesh,_tid,,20669,all,,11,z,0.0,,_wbpstol,_tid,cmebolt,cmnbolt
*get,_echck2,elem,,num,max    ! make sure psmesh command was successful
*if,_echck1,eq,_echck2,then
  *msg,error
  THE PRETENSION LOAD WAS NOT ABLE TO BE APPLIED. &
  MAKE SURE THE LOAD WAS NOT APPLIED TO A HOLE AND THAT &
  THE LOAD IS NOT APPLIED MORE THAN ONCE PER SURFACE
*endif
esel,all
nsel,all
csys,0
/com,*********** Create Bolt Pretension "_____ 5" ***********
*set,_pretnode,20670
_nbolt217 = 20670               ! that will be the pretension node number
local,11,1,2.03297250935792,-40.4209997084933,70.,0.,90.,0.
nmod,20670,0,0,0,,,,1      ! move pretension node to bolt center, don't update centroid
CMBLOCK,C4      ,NODE,      165
(8i10)
     19818     19819     19820     19821     19822     19823     19824     19825
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cmsel,s,C4
*get,_maxx,node,0,mxloc,x  ! get the radius of the cylinder
nsel,all                   ! select all nodes back because *get,CENTRX needs it
*set,_tid,49
et,_tid,179
type,_tid
real,_tid
mat,_tid
secnum,_tid
esel,s,type,,6
*get,_necurr,elem,,count    ! get number of elements on body
_ecurr=0                    ! seed value
*do,_i,1,_necurr
  _ecurr = ELNEXT(_ecurr)
  *get,_radius,elem,_ecurr,cent,x
  *if,_radius,gt,_maxx,then
    esel,u,elem,,_ecurr     ! unselect element since not inside cylinder radius
  *endif
*enddo
*set,_wbpstol,3.20631218268593e-002
*get,_echck1,elem,,num,max    ! make sure psmesh command was successful
psmesh,_tid,,20670,all,,11,z,0.0,,_wbpstol,_tid,cmebolt,cmnbolt
*get,_echck2,elem,,num,max    ! make sure psmesh command was successful
*if,_echck1,eq,_echck2,then
  *msg,error
  THE PRETENSION LOAD WAS NOT ABLE TO BE APPLIED. &
  MAKE SURE THE LOAD WAS NOT APPLIED TO A HOLE AND THAT &
  THE LOAD IS NOT APPLIED MORE THAN ONCE PER SURFACE
*endif
esel,all
nsel,all
csys,0
/com,*********** Create Bolt Pretension "_____ 6" ***********
*set,_pretnode,20671
_nbolt219 = 20671               ! that will be the pretension node number
local,11,1,45.3342426985792,-40.4209997084933,95.,0.,90.,0.
nmod,20671,0,0,0,,,,1      ! move pretension node to bolt center, don't update centroid
CMBLOCK,C5      ,NODE,      165
(8i10)
     15138     15139     15140     15141     15142     15143     15144     15145
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cmsel,s,C5
*get,_maxx,node,0,mxloc,x  ! get the radius of the cylinder
nsel,all                   ! select all nodes back because *get,CENTRX needs it
*set,_tid,50
et,_tid,179
type,_tid
real,_tid
mat,_tid
secnum,_tid
esel,s,type,,2
*get,_necurr,elem,,count    ! get number of elements on body
_ecurr=0                    ! seed value
*do,_i,1,_necurr
  _ecurr = ELNEXT(_ecurr)
  *get,_radius,elem,_ecurr,cent,x
  *if,_radius,gt,_maxx,then
    esel,u,elem,,_ecurr     ! unselect element since not inside cylinder radius
  *endif
*enddo
*set,_wbpstol,3.20631218268593e-002
*get,_echck1,elem,,num,max    ! make sure psmesh command was successful
psmesh,_tid,,20671,all,,11,z,0.0,,_wbpstol,_tid,cmebolt,cmnbolt
*get,_echck2,elem,,num,max    ! make sure psmesh command was successful
*if,_echck1,eq,_echck2,then
  *msg,error
  THE PRETENSION LOAD WAS NOT ABLE TO BE APPLIED. &
  MAKE SURE THE LOAD WAS NOT APPLIED TO A HOLE AND THAT &
  THE LOAD IS NOT APPLIED MORE THAN ONCE PER SURFACE
*endif
esel,all
nsel,all
csys,0
fini
/com,****************************************************************************
/com,*************************    SOLUTION       ********************************
/com,****************************************************************************
/solu
antype,0                   ! static analysis
_thickRatio=  0     ! Ratio of thick parts in the model
eqsl,sparse,,,,,1
cntr,print,1               ! print out contact info and also make no initial contact an error
dmpoption,emat,no             ! Don't combine emat file for DANSYS
dmpoption,esav,no             ! Don't combine esav file for DANSYS
nldiag,cont,iter           ! print out contact info each equilibrium iteration
rescontrol,define,last,last,,dele	   ! Program Controlled
/com,****************************************************
/com,******************* SOLVE FOR LS 1 OF 1 ****************
f,20666,fx,4191.50510913721
f,20667,fx,4438.91555276383
f,20668,fx,4130.42581834274
f,20669,fx,4618.17772953527
f,20670,fx,3138.13935070254
f,20671,fx,4337.70543765607
autots,on                  ! Workbench Program Controlled automatic time stepping
nsub,1,10,1                ! due to presence of general nonlinear
time,1.
outres,erase
outres,all,none
outres,nsol,all,
outres,rsol,all
outres,eangl,all
outres,etmp,all
outres,veng,all
outres,strs,all,
outres,epel,all,
outres,eppl,all,
outres,cont,all,
! *********** WB SOLVE COMMAND ***********
! check interactive state
*get,ANSINTER_,active,,int
*if,ANSINTER_,ne,0,then
/eof
*endif
solve
/com *************** Write FE CONNECTORS *********
CEWRITE,file,ce,,INTE
/com,****************************************************
/com,*************** FINISHED SOLVE FOR LS 1 *************
*get,_NSOLTHREADS,active,0,ntfs
*get,_NSOLPROCESSES,active,0,npfs
/post1
fini
